7
# Examples - Steady State heat Transfer Spring 2018
# Example 1
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# Data
T_inf_o := -15*K
h_i := 20*W/(m^2*K)
h_o := 150*W/(m^2*K)
A_area := 400*m^2
L_p := 10*mm
L_b := 100*mm
L_s := 20*mm
T_inf_i := 20*K
k_p := 0.1*W/(m*K)
k_b := 0.04*W/(m*K)
k_s := 0.15*W/(m*K)
(a)
ΣRes := 1/(h_i*A_area) + L_p/(k_p*A_area) + L_b/(k_b*A_area) + L_s/(k_s*A_area) + 1/(h_o*A_area)
ΣRes = 0.006975 K/W
q := (T_inf_i - T_inf_o)/ΣRes = 5017.92 W
# (b) Estimate the temperature at the boundary between the glass fiber blanket and the
# plywood siding.  It will be called T_bound and the resistances bewtween the interior
# of the house will include the convection inside, conduction through the plaster board and
# the glass fiber blanket
ΣRes_new := 1/(h_i*A_area) + L_p/(k_p*A_area) + L_b/(k_b*A_area)
ΣRes_new = 0.006625 K/W
# The heat flow remains the same but the resistance changes, from the equation considering the driving  temperature difference T_inf_i-T_bound we can estimate T_bound
# q = (T_inf_i-T_bound)/ΣRes_new  -->
T_bound := T_inf_i - q*ΣRes_new
T_bound = -13.2437 K  # or -13.2C
# (c) All the materials thickness will be the same except the fiber glass blanket to reduce
# the heat flow by 30%
q_new := 0.30*q
R_ci := 1/(h_i*A_area)
R_pb := L_p/(k_p*A_area)
R_ps := L_s/(k_s*A_area)
R_co := 1/(h_o*A_area)
R_gb := (T_inf_i - T_inf_o)/q_new - (R_ci + R_pb + R_ps + R_co)
R_gb = 0.022525 K/W
L_bnew := R_gb*k_b*A_area
L_bnew = 360.4 mm
# Example 2
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R_ei := 10.2 mm
T_o := 21*K
k_1 := 0.35*W/(m*K)
R_e1 := 12.7*mm
T_1 := 37*K
k_2 := 0.80*W/(m*K)
R_e2 := 16.5*mm
h_ei := 12*W/(m^2*K)
h_eo := 6*W/(m^2*K)
# (a) Heat loss with contact lens (the layer 2 is added)
# Assumed is a spherical surface so Resistances will be calculated from the
# following equations:
R_conv_i := 1/(4*π*R_ei^2*h_ei)
R_conv_i = 63.7395 K/W
R_cond_1 := (R_e1 - R_ei)/(4*π*k_1*R_ei*R_e1)
R_cond_1 = 4.38792 K/W
R_cond_2 := (R_e2 - R_e1)/(4*π*k_2*R_e1*R_e2)
R_cond_2 = 1.80383 K/W
R_conv_o := 1/(4*π*R_e2^2*h_eo)
R_conv_o = 48.7159 K/W
# Because the eye is approximated as 1/3 of a spherical surface
q_w_lens := 1/3*(T_1 - T_o)/(R_conv_i + R_cond_1 + R_cond_2 + R_conv_o)
q_w_lens = 44.9512 mW
# (b) Without contact lens the second conduction layer must be ignored, and a new
# convection thermal resistance must be recalculated because the external area decreases
R_conv_o_new := 1/(4*π*R_e1^2*h_eo)
q_wout_lens := 1/3*(T_1 - T_o)/(R_conv_i + R_cond_1 + R_conv_o_new)
q_wout_lens = 35.471 mW
# Example 3
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D_si := 36 mm
e_s := 2*mm
k_ss := 15*W/(m*K)
R_s0 := D_si/2 + e_s
R_si := D_si/2
T_i := 6*K
T_inf := 23*K
h_si := 400*W/(m^2*K)
h_s0 := 6*W/(m^2*K)
# (a) Heat Gain per unit length
R_conv_si := 1/(h_si*2*π*R_si)
R_conv_si = 0.0221049 m*K/W
R_cond_s := ln(R_s0/R_si)/(2*π*k_ss)
R_cond_s = 0.00111791 m*K/W
R_conv_s0 := 1/(h_s0*2*π*R_s0)
R_conv_s0 = 1.32629 m*K/W
q_p := (T_inf - T_i)/(R_conv_si + R_cond_s + R_conv_s0)
q_p = 12.5971 W/m
# (b) Heat gain if a 10mm thick layer of calcium silicate insulation (k_ins=0.05 W/m.K)
# is applied to the tube
# New radius can be calculated as:
e_insul := 10*mm
k_ins := 0.05*W/(m*K)
R_ext := R_s0 + e_insul
# and the new resistance due conduction can be calculated as
R_cond_insul := ln(R_ext/R_s0)/(2*π*k_ins)
R_cond_insul = 1.29064 m*K/W
# and the new resistance to the convection with he new radius is
R_conv_new := 1/(h_s0*2*π*R_ext)
R_conv_new = 0.884194 m*K/W
# And the new gain per unit length is
q_p_new := (T_inf - T_i)/(R_conv_si + R_cond_s + R_cond_insul + R_conv_new)
q_p_new = 7.73412 W/m
# Example 4
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L_f := 0.25*mm
L_sus := 1*mm
k_f := 0.025*W/(m*K)
k_sus := 0.05*W/(m*K)
T_air := 20*K
T_0 := 60*K
T_1s := 30*K
h_air := 50*W/(m^2*K)
# (a) Thermal circuit when the film is transparent
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R_conv_air := 1/h_air
R_conv_air = 0.02 K*m^2/W
R_cond_film := L_f/k_f
R_cond_film = 0.01 K*m^2/W
R_cond_sus := L_sus/k_sus
R_cond_sus = 0.02 K*m^2/W
q_1_2p := (T_0 - T_air)/(R_cond_film + R_conv_air)
q_1_2p = 1.33333 kW/m^2
q_2_2p := (T_0 - T_1s)/R_cond_sus
q_2_2p = 1.5 kW/m^2
q_o_2p := q_1_2p + q_2_2p
q_o_2p = 2.83333 kW/m^2
# (b) the film is not transparent and the radiant heat s absorbed at the interface film/air
# Since we do not know Ts, we can calculate the heat flux between To and T1 that for steady state is
q_2_2p_new := (T_0 - T_1s)/R_cond_sus
q_2_2p_new = 1.5 kW/m^2
# and for steady state the temperature Ts can be calculated as;
T_S := T_1s + q_2_2p_new*(R_cond_film + R_cond_sus)
T_S = 75 K  # or T_S=75C
q_1_2p_new := (T_S - T_air)/R_conv_air
q_1_2p_new = 2.75 kW/m^2
q_0_2p_new := q_1_2p_new + q_2_2p_new
q_0_2p_new = 4.25 kW/m^2
# Example 5
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# Data
# - Window 1
k_glass := 0.9*W/(m*K)
x_1 := 10*mm
h_in := 10*W/(m^2*K)
h_out := 200*W/(m^2*K)
# (a) | Units for the data temperatures are in Farenheit
T_room := 72
T_out := 18
# Conversion of Temperatures from Farenheit to Kelvins
T_room_K := (T_room - 32)/1.8*K
T_out_K := (T_out - 32)/18*K
# - Windows 2
k_air := 0.03*W/(m*K)
x_2 := 5*mm
# - Heat Transfer for Window 1 - Calculated as Flux, that is heat flow per unit area
R_cv_room := 1/h_in
R_cd_glass := x_1/k_glass
R_cv_out := 1/h_out
q_1 := (T_room_K - T_out_K)/(R_cv_room + R_cd_glass + R_cv_out)
q_1 = 198.086 W/m^2
# - Heat Transfer for Window 2 - Calculated as Flux, that is heat flow per unit area
# without considering radiation and only conduction through the air gap
R_cd_glass1 := x_1/k_glass
R_cd_air_gap := x_1/k_air
R_cd_glass2 := x_1/k_glass
q_2 := (T_room_K - T_out_K)/(R_cv_room + R_cd_glass1 + R_cd_air_gap + R_cd_glass2 + R_cv_out)
q_2 = 49.9397 W/m^2
# (b)
# The equation for radiation is:
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# where σ is the stefan-Boltzman constant and A is the area of heat exchange.  T_1 and T_2
# are absolute temperatures (in degree Kelvin or Rankine).  By using algebra the equation can be modified as follows:
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# if we define  the radiation equation is
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# (c) So now rather that having a resistance due to conduction in the air gap will be
# conduction plus radiation
# First let's calculate h_r
σ := 5.678*10^-8*W/(m^2*K^4)
T_1_K := T_room_K + 273*K
T_2_K := T_out_K + 273*K
T_avg := (T_1_K + T_2_K)/2
h_r := 4*σ*T_avg^3
h_r = 5.18723 W/(K*m^2)
T_avg = 283.722 K
R_eq := 1/(h_r + k_air/x_2)
# So now the new heat flux including radition is:
q_3 := (T_room_K - T_out_K)/(R_cv_room + R_cd_glass1 + R_eq + R_cd_glass2 + R_cv_out)
q_3 = 106.182 W/m^2
# The heat flux is larger than the once calculated
# considering conduction alone
# Example 6
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L_tiss := 3*mm
k_tiss := 0.2*W/(m*K)
h_c := 25*W/(m^2*K)
h_w := 65*W/(m^2*K)
T_tiss := 36*K
T_air_out := -15*K
# (a)
R_calm := L_tiss/k_tiss + 1/h_c
R_calm = 0.055 m^2*K/W
R_windy := L_tiss/k_tiss + 1/h_w
R_windy = 0.0303846 m^2*K/W
Ratio_calm_over_windy := R_windy/R_calm
Ratio_calm_over_windy = 0.552448
# (b) Skin Temperatures  T_skin in calm and windy day
# calm day
q_c_2p := (T_tiss - T_air_out)/R_calm
q_c_2p = 927.273 W/m^2
R_conv_calm := 1/h_c
# and the temperature can be calculated as:
T_skin_calm := T_air_out + q_c_2p*R_conv_calm
T_skin_calm = 22.0909 K  # In fact is in Celcius
# Windy day
q_w_2p := (T_tiss - T_air_out)/R_windy
q_w_2p = 1678.48 W/m^2
# and the temperature can be calculated as:
R_conv_windy := 1/h_w
T_skin_windy := T_air_out + q_w_2p*R_conv_windy
T_skin_windy = 10.8228 K  # In fact is in Celcius
