# ABE 30800 - Unstedy State Heat Transfer
# Problem 1
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kJ := 1000*J
k_therm := 20*W/(m*K)
c_therm := 0.40*kJ/(kg*K)
ρ_therm := 8500*kg/m^3
h_1 := 400*W/(m^2*K)
T_f1 := 200*K
T_f_ini := 25 K
t_const := 1*s
# Unfortunately, we cannot calculate the biot number to check if we can use the lumped parameter approach because we do not know the radius of the thermocuple ball.  Let's assume that the biot number will be smaller than 0.1
# The time constant can be estimated as:  t_const = mc/hA (see slides and notes for more
# description on this
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R_therm := 3*t_const*h_1/(ρ_therm*c_therm)
R_therm = 0.352941 mm
d_therm := 2*R_therm
d_therm = 0.000705882 m
# Let's check now the Biot Number
Bi_therm := h_1*R_therm/k_therm
Bi_therm = 0.00705882
# The assumption ws fine, and the Lumped parameter analysis is applicable
# (b) Time to reach a temperature of 199C (because time differences are used and to avoid unit problem we use the temperatures in Kelvin)
T_f_end := 199*K
m_therm := 4/3*π*R_therm^3*ρ_therm
A_therm := 4*π*R_therm^2
t_t := -(m_therm*c_therm/(h_1*A_therm))*ln((T_f_end - T_f1)/(T_f_ini - T_f1))
t_t = 5.16479 s
# Problem 2
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ρ_cyl := 7900*kg/m^3
c_cyl := 526*J/(kg*K)
h_2 := 500*W/(m^2*K)
T_cyl_ini := 327*K
T_f_cyl := 27*K
k_cyl := 17.4*W/(m*K)
α_cyl := k_cyl/(ρ_cyl*c_cyl)
α_cyl = 4.18732e-6 m^2/s
t_q := 3*min
D_cyl := 80*mm
R_cyl := D_cyl/2
H_cyl := 60*mm
L_half := H_cyl/2
# (1) Temperature in location (center of the infinite cylinder and the slab slicing the cylinder
r_1_cyl := 0
n_1_cyl := r_1_cyl/R_cyl
m_1_cyl := k_cyl/(h_2*R_cyl)
m_1_cyl = 0.87
Fo_1_cyl := α_cyl*t_q/R_cyl^2
Fo_1_cyl = 0.471074
# Since Fo > 0.2 we can use either charts or the tables.  Let's use both for practice
# Using Tables
# Infinite Cylinder
Bi_1_cyl := 1/m_1_cyl
Bi_1_cyl = 1.14943
# From tables for an infinite cylinder and interpolation γ_1 = 1.31 and C_1 = 1.23
C_11_cyl := 1.23
γ_11_cyl := 1.31
Y_1_inf_cyl := C_11_cyl*exp(-γ_11_cyl^2*Fo_1_cyl)*J0(γ_11_cyl*r_1_cyl/R_cyl)
Y_1_inf_cyl = 0.548046  # The chart gives a value of 0.55
# Infinite Slab
x_1_slab := 0
n_1_slab := x_1_slab/L_half
Fo_1_slab := α_cyl*t_q/L_half^2
Fo_1_slab = 0.837465
# >  0.2 so we can use the approximate
# equations
m_1_slab := k_cyl/(h_2*L_half)
Bi_slab := 1/m_1_slab
Bi_slab = 0.862069
# From tables for an infinite slab and Biot 0.862 and interpolation γ_1 = 0.792 and C_1 = 1.106
C_11_slab := 1.106
γ_11_slab := 0.792
Y_1_inf_slab := C_11_slab*exp(-γ_11_slab^2*Fo_1_slab)*cos(γ_11_slab*n_1_slab)
Y_1_inf_slab = 0.654057  # The chart gives a value of 0.65
Y_1_finite_cyl := Y_1_inf_cyl*Y_1_inf_slab
Y_1_finite_cyl = 0.358453
# Temperature in Celcius
T_1_finite_cyl := T_f_cyl + Y_1_finite_cyl*(T_cyl_ini - T_f_cyl)
T_1_finite_cyl = 134.536 K
# (2) Temperature in one of the bases of the cylinder (point 2)
# It is calculated in the center of the infinite cylinder (calculated before) and the surface of the slab
check := cos(π)
check = -1
x_2_slab := L_half
n_2_slab := x_2_slab/L_half
# All other parameters are the same
C_12_slab := C_11_slab
γ_12_slab := γ_11_slab
Y_2_inf_cyl := Y_1_inf_cyl
Y_2_inf_slab := C_12_slab*exp(-γ_12_slab^2*Fo_1_slab)*cos(γ_12_slab*n_2_slab)
Y_2_inf_slab = 0.459425  # The chart gives a value of 0.43
Y_2_finite_cyl := Y_2_inf_cyl*Y_2_inf_slab
T_2_finite_cyl := T_f_cyl + Y_2_finite_cyl*(T_cyl_ini - T_f_cyl)
T_2_finite_cyl = 102.536 K
# (3) Temperature in the side of the cylinder (point 3)
#
# It is calculated in side of the infinite cylinder and the surface of the slab (calculated before)
r_3_cyl := R_cyl
n_3cyl := r_3_cyl/R_cyl
# All the other parameters remain the same
C_13_cyl := C_11_cyl
γ_13_cyl := γ_11_cyl
C_13_slab := C_11_slab
γ_13_slab := γ_11_slab
Y_3_inf_slab := Y_2_inf_slab
Y_3_inf_cyl := C_13_cyl*exp(-γ_13_cyl^2*Fo_1_cyl)*J0(γ_13_cyl*n_3cyl)
Y_3_finite_cyl := Y_3_inf_cyl*Y_3_inf_slab
T_3_finite_cyl := T_f_cyl + Y_3_finite_cyl*(T_cyl_ini - T_f_cyl)
T_3_finite_cyl = 73.4435 K
# Problem 3
# Let's assume that the potato has a spherical geometry and that the coldest oint is the center
# of the potato
h_3 := 20*W/(m^2*K)
k_pot := 0.4*W/(m*K)
α_pot := 1.5*10^-7*m^2/s
D_pot := 4*cm
R_pot := D_pot/2
T_steam := 121*K
T_pot_ini := 30*K
T_center := 115*K
Bi_pot := h_3*R_pot/k_pot
Bi_pot = 1
# We cannot use the Lumped
# Parameter equation
# from charts for an spherical geometry
#
# r_3sph= 0  -->  n_3sphe = 0
#
# m = 1
#
# Y = (115-121)/(30-121)
F_o_sp := 1.2
t_heating := F_o_sp*R_pot^2/α_pot
t_heating = 53.3333 min
# Problem 4
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T_bath := 1300*K
D_sball := 20*mm
T_sball_ini := 300*K
T_curing := 1000*K
R_sball := D_sball/2
h_4 := 5000*W/(m^2*K)
ρ_sball := 7800*kg/m^3
k_sball := 50*W/(m*K)
c_sball := 500*J/(kg*K)
# Let's try to see if the Lumped parameter Analysis can be used, and let's calculate the Biot Number
Bi_sball := h_4*R_sball/k_sball
Bi_sball = 1
# We cannot use the
# Lumped Parameter Analysis
# This is a typical problem where the thermal conductivity of the solid is very high so thermal resistance to conduction in the solid is very small and one would think that the lumped parameter analysis will be suitable. However, the heat transfer outside by convection is very high (thermal resistance even smaller than the thermal resistance in the solid) and all the energy transferred by convection could not conducted without an significant temperature gradient, so the lumped parameter analysis will not work.  In that sense the Biot number compares these two resistances.
Y_sball := (T_curing - T_bath)/(T_sball_ini - T_bath)
Y_sball = 0.3
m_sball := 1/Bi_sball
m_sball = 1
x_sball := 9*mm
n_sball := x_sball/R_sball
n_sball = 0.9
# Using charts for spherical geometries
Fo_curing := 0.44
t_curing := Fo_curing*ρ_sball*c_sball*R_sball^2/k_sball
t_curing = 3.432 s
# We can verify this result by using the approximate solution for a sphere, obviosuly these solutions work for Fo > 0.2, which apparasto be this case
# For Bi = 1 from tables for spherical geometry we get:
C_1ball := 1.2732
γ_1ball := 1.5708
Fo_curing_Eq := -1/γ_1ball^2*ln(γ_1ball*n_sball/sin(γ_1ball*n_sball)*Y_sball/C_1ball)
Fo_curing_Eq = 0.4405  # Same value
# Problem 5
T_finger_ini := 33*K
T_damage := 62*K
α_finger := 2.5*10^-7*m^2/s
t_contact := 2*s
T_surface := 200*K
# Remember that although the temperatures should be in degrees Celcius we are using temperatures in Kelvins to avoid problems with the units in MathCad. As long we deal with temperature differences there is not problem and no corrections are needed beyong remember that if a temperature is the result, that temperature need to be considered in degree Celcius. Lets' consider the solution for an semi-infinite domain, which is fine because the thermal diffusivity ofthe finger is very small.
Y_finger := (T_damage - T_finger_ini)/(T_surface - T_finger_ini)
Y_finger = 0.173653
erf(ϕ) == 1 - Y_finger solve → 0.962061392272
ϕ_d := 0.962
x_damaged := ϕ_d*2*sqrt(α_finger*t_contact)
x_damaged = 1.36047 mm
# Checking
x_condition := 4*sqrt(α_finger*t_contact)
x_condition = 2.82843 mm
# it is right to assume a semi-infite domain
