# Homework 1
# Question 1
# Temperatures are all expresed in degree Celciusb but to have consistent results in MathCad, they are writing in Kelvin, since the calculation of entalphies are based o temperatures differences, results are the same if we express temperatures in either Kelvins or Celsius
T_air_out := 30*K
T_air_in := -10*K
T_coolant_in := 85*K
T_coolant_out := 45*K
V_air := 30*m^3/min
kJ := 1000*J
C_p_air := 1*kJ/(kg*K)
C_p_coolant := 3.3*kJ/(kg*K)
ρ_air := 1.2*kg/m^3
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# The equation above is obtained by considering state state dU/dt = 0, adiabatic process or not heat loss Q=0 (so it is not a energy transport problem) and shaft work W_s = 0. Specific enthalpy can be calculated as h = Cp T with units kJ/kg, if T_ref is assumed to be 0^oC
m_air := V_air*ρ_air
m_air = 36 kg/min
m_coolant := m_air*C_p_air*(T_air_out - T_air_in)/(C_p_coolant*(T_coolant_in - T_coolant_out))
m_coolant = 10.9091 kg/min
# Question 2
d_plyw := 1*in
T_1 := 100*F
T_2 := 50*F
k_plyw := 0.070*BTU/(hr*ft*F)
# Assumptions
# - 1D heat flow
# - Steady State
# - No Convection
# - No heat generation
# Definetely is a energy transfer process so we can use the equations derived in class for the Flux
Flux := k_plyw*(T_1 - T_2)/d_plyw
Flux = 42 International_BTU/(ft^2*hr)
# Question 3
# (a)
# (1) two boundary conditions in x and y and one initial condition
# (2) T(x,y,t)
# (3) The equation assumes no convection and no heat genration
# (4) The model is assuming Cartesian coordinates
#
# (b)
# (1) two boundary conditions in r
# (2) T(r)
# (3) The equation assumes no convection, no heat heat generation and steady state
# (4) The model is assuming cylindrical coordiates
#
# (c)
# (1) One boundary condition in x and two boundary condtions in y
# (2) T(x,y)
# (3) The equation no heat generation, 1D conduction in direction y and and steady state
# (4) The model is assuming Cartesian Coordinates
# Question 4
# Straight forward proof
# Question 5
m_p := 85
h_p := 1.80
A_p := 2.5
u_p := 1.1
h := 25
T_air := 22 + 273
σ := 5.676*10^-8
# Balance of Energy is:
#
# Energy In  -  Energy Out + Generation =Storage
# Let's assume steady state so storage = 0
# Energy_in=0
# Energy Out=hA(T_s-T_w)+σA(T_s^4-T_w^4)+0.12u_px13.3xexp(20.4-5132/T_s)=0
# Generation=4m_pu_p
# We can use the balance of Energy and construct an equation to estimate T_s
f(T_S) := 4*m_p*u_p - h*A_p*(T_S - T_air) - (σ*A_p*(T_S^4 - T_air^4) + 0.12*u_p^0.5*A_p*(13.3*(e^(20.4 - 5132/T_S) - 0)))
T_S := 300
T_Sol := root(f(T_S), T_S)
T_Sol = 298.499
Temp_of_body := T_Sol - 273
Temp_of_body = 25.499  # In Celsius
# (b) We can assume that in order to keep stady state all the heat generated by the person
# must be lost so:
h_eff := 4*m_p*u_p/(A_p*(26 - (T_air - 273)))
h_eff = 37.4  # Units are W/m^2
