# Homework 2 - Solutions
# Question 1
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# (a)
R_ti := 10*cm
R_to := 12*cm
e_ins := 5*cm
k_tube := 400*W/(m*K)
# h_steam is very large so inner temperature is same
# than the temperature of the steam
T_steam := 110*K
T_env := 30*K
k_ins := 0.20*W/(m*K)
h_out := 15*W/(m^2*K)
# Uninsulated Tube
R_unins := ln(R_to/R_ti)/(2*π*k_tube) + 1/(h_out*2*π*R_to)
R_unins = 0.088492 m*K/W
q_unins_1p := (T_steam - T_env)/R_unins
q_unins_1p = 904.037 W/m
# Insulated Tube
R_ext := R_to + e_ins
R_ins := ln(R_to/R_ti)/(2*π*k_tube) + ln(R_ext/R_to)/(2*π*k_ins) + 1/(2*π*h_out*R_ext)
R_ins = 0.33966 m*K/W
q_ins_1p := (T_steam - T_env)/R_ins
q_ins_1p = 235.53 W/m
# (b) Overall heat Transfer Coefficients
# Uninsulated Tube
U_i_unin := 1/(R_ti/k_tube*ln(R_to/R_ti) + R_ti/R_to*1/h_out)
U_i_unin = 17.9852 W/(m^2*K)
U_o_unin := 1/(R_to*ln(R_to/R_ti)/k_tube + 1/h_out)
U_o_unin = 14.9877 W/(m^2*K)
# However, the calculation of the heat flow is the same and independent on the area that is considered, which is demostrated next, using values of the areas per unit of length of the inner and outer surface A_i and A_o, in m^2/m length
A_i := 2*π*R_ti
q_i_unins := U_i_unin*A_i*(T_steam - T_env)
q_i_unins = 904.037 W/m
A_o_unins := 2*π*R_to
q_o_unins := U_o_unin*A_o_unins*(T_steam - T_env)
q_o_unins = 904.037 W/m
# Insulated Tube
U_i_ins := 1/(R_ti/k_tube*ln(R_to/R_ti) + R_ti/k_ins*ln(R_ext/R_to) + R_ti/R_ext*1/h_out)
U_i_ins = 4.68571 W/(m^2*K)
q_i_ins := U_i_ins*A_i*(T_steam - T_env)
q_i_ins = 235.53 W/m
U_o_in := 1/(R_ext*ln(R_to/R_ti)/k_tube + R_ext*ln(R_ext/R_to)/k_ins + 1/h_out)
U_o_in = 2.7563 W/(m^2*K)
A_o_ins := 2*π*R_ext
q_o_ins := U_o_in*A_o_ins*(T_steam - T_env)
q_o_ins = 235.53 W/m
# Question 2
# (a) Included in a a different file
#
# (b)
d_i := 2*cm
r_i := d_i/2
k_insul := 0.17*W/(m*K)
h := 2*W/(m^2*K)
r_c := k_insul/h
r_c = 8.5 cm
e_crit := r_c - r_i
e_crit = 7.5 cm
T_i := 100*K
T_inf := 10*K
R_cond := ln(r_c/r_i)/(2*π*k_insul)
R_cond = 2.00354 m*K/W
R_conv := 1/(2*π*h*r_c)
R_conv = 0.936206 m*K/W
q_rc := (T_i - T_inf)/(R_cond + R_conv)
q_rc = 30.6149 W/m
# Plot
R_cd(r) := ln(r/r_i)/(2*π*k_insul)
R_cv(r) := 1/(2*π*h*r)
q(r) := (T_i - T_inf)/(R_cd(r) + R_cv(r))
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# Question 3
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# (a)
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# (b)  All the resistance calculations are straight forward except in the air gaps.  It was demonstrated that for resistances in parallel, for example between the temperatures T_3 and T_4 the "equivalent" thermal resistance can be calculated as:
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# Data | Moisture Barrier | Thermal Liner
# Shell Layer
L_mb := 0.7*mm
L_tl := 4 mm
L_shell := 1 mm
k_shell := 0.06*W/(m*K)
k_mb := 0.015*W/(m*K)
k_tl := 0.045*W/(m*K)
# Let's calculate all the resistances which will be evaluated by unit of area (mainly
# because the area is not known).  Since we do not know the convection coefficient outside (fire side), we can assume that is very large so the thermal resistance is negligible.
# Resistances
# Shell Layer | Moisture Barrier | Thermal Liner
R_shell := L_shell/k_shell
R_mb := L_mb/k_mb
R_tl := L_tl/k_tl
R_shell = 0.0166667 m^2*K/W
R_mb = 0.0466667 m^2*K/W
R_tl = 0.0888889 m^2*K/W
# To estimate the resistance in the air gap it is necessary to estimate the resistance
# due to radiation and conduction in the air.  Let's assume that the conductivity of air is
# k_air=0.04 W/m.K taken at approximately 470K.  In Appendix Table C8 from the textbook.
k_air := 0.04*W/(m*K)
L_air := 1 mm
R_cond_air := L_air/k_air
R_cond_air = 0.025 m^2*K/W
# Now we have to calculate the resistance due to radiation
σ := 5.676*10^-8*W/(m^2*K^4)
T_avg := (470 + 273)*K
h_rad := 4*σ*T_avg^3
R_radiation := 1/h_rad
R_radiation = 0.0107382 m^2*K/W
R_air_gap := 1/(1/R_radiation + 1/R_cond_air)
R_air_gap = 0.00751171 m^2*K/W
# From the calculated resistances the thermal liner is what produces the highest thermal resistance.
q_fire := 2500*W/m^2
T_inside := (50 + 273)*K
R_total := R_shell + R_mb + 2*R_air_gap + R_tl
R_total = 0.167246 m^2*K/W
T_s := T_inside + q_fire*R_total
T_s = 741.114 K
# So temperature outside of the coat will be about 741.1K or 468.1C
# Question 4
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# Data
D_bone := 25*mm
r_bone := D_bone/2
e_muscle := 2.1*mm
e_dermis := 0.4*mm
k_m_fat := 0.3*W/(m*K)
k_dermis := 0.1*W/(m*K)
k_glove := 0.02*W/(m*K)
h_amb := 100*W/(m^2*K)
e_glove := 1.4*mm
r_m_fat := r_bone + e_muscle
r_dermis := r_m_fat + e_dermis
# (a) The heat loss per unit length q_prime can be calculated from the resistances in the different layers of the finger, so the resistances need to be estimated
# Without Gloves
R_muscle := 1/(2*π*k_m_fat)*ln(r_m_fat/r_bone)
R_muscle = 0.0823854 m*K/W
R_dermis := 1/(2*π*k_dermis)*ln(r_dermis/r_m_fat)
R_dermis = 0.0430175 m*K/W
R_conv_ := 1/(2*π*h_amb*r_dermis)
R_conv_ = 0.106103 m*K/W
# With Gloves
# If we add the glove there will be a change in the heat flux per unit length because we need to add the Resistance of the Glove.  The radius after the glove is added will be:
r_glove := r_dermis + e_glove
R_glove := 1/(2*π*k_glove)*ln(r_glove/r_dermis)
R_glove = 0.710079 m*K/W
# Since the external radius changes due to the glove, convection will change
# and the new Resistance to Convection will be:
R_new_conv := 1/(2*π*h_amb*r_glove)
R_new_conv = 0.0970457 m*K/W
# The major resistance is due to the glove.  We can calculate (no asked but needed it) the heat fluxes per unit length when you have and when you don't have gloves. I need to enter temperatures, pleases note that since I will use temperature differences I can use temperartures in degrees Kelvin
T_ib := 37*K
T_out := -25*K
# Without Gloves
q_prime_wout_gloves := (T_ib - T_out)/(R_muscle + R_dermis + R_conv_)
q_prime_wout_gloves = 267.811 W/m
# With Gloves
q_prime_with_gloves := (T_ib - T_out)/(R_muscle + R_dermis + R_glove + R_new_conv)
q_prime_with_gloves = 66.486 W/m
# An important decrease in the heat flow per unit length
# Let's assume the frostbite is within the dermis layer and can be located by the radius r_fb where the temperature is reaches -1C
T_fb := -1*K
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r_fb_nogv := r_dermis/exp(2*π*(T_fb - T_out)*k_dermis/q_prime_wout_gloves - k_dermis/(h_amb*r_dermis))
r_fb_nogv = 15.1562 mm
Damaged_dermis := r_dermis - r_fb_nogv
Damaged_dermis = -0.156203 mm
# The value is negative, it may indicate that all the dermis is affected and the frostbite can be even move to the muscle/fat zone.  Equation to calculate the frosbite distance including that zone can be calculated using the following (it can be derived by assuming the frostbite is with the muscle/fat zone zone), which we will define as new frost bite.
r_fb_nogv_new := r_m_fat/exp(2*π*(T_fb - T_out)*k_m_fat/q_prime_wout_gloves - k_m_fat/k_dermis*ln(r_dermis/r_m_fat) - k_m_fat/(h_amb*r_dermis))
r_fb_nogv_new = 16.333 mm
NewDamaged_dermis := r_dermis - r_fb_nogv_new
NewDamaged_dermis = -1.33298 mm
# So the frostbite is very severe and we can have
# temperatures of -1C in the bone
# When gloves are weared,you replace in the above equation (the heat flux using gloves)
r_fb_withgv := r_dermis/exp(2*π*(T_fb - T_out)*k_dermis/q_prime_with_gloves - k_dermis/(h_amb*r_dermis))
r_fb_withgv = 12.7803 mm
DamagedDermis_with_globe := r_dermis - r_fb_withgv
DamagedDermis_with_globe = 2.21967 mm
# Better wear gloves when temperature outside
# is -25C or -13F
# Question 5
# (a)
D_fin := 2.5 mm
P := π*D_fin
k_fin := 400*W/(m*K)
A_c := π*D_fin^2/4
T_fin := 95*K
T_amb_air := 25*K
h_fin_air := 10*W/(m^2*K)
q_fin := sqrt(h_fin_air*k_fin*P*A_c)*(T_fin - T_amb_air)
q_fin = 0.869276 W
# (b)  For a 25mm length let's use the equation below given in the problem, but first we need to calculate the heat with no fin which is:
q_non_fin := A_c*h_fin_air*(T_fin - T_amb_air)
m_p := sqrt(h_fin_air*P/(k_fin*A_c))
m_p = 6.32456 1/m
L_fin := 25*mm
q_finite_fin := sqrt(k_fin*P/(h_fin_air*A_c))*(sinh(m_p*L_fin) + h_fin_air/(m_p*k_fin)*cosh(m_p*L_fin))/(cosh(m_p*L_fin) + h_fin_air/(m_p*k_fin)*sinh(m_p*L_fin))*q_non_fin
q_finite_fin = 0.13966 W  # Very different value
# (c) For the two solutions be within 5%
# sinh m_pL + h/m_pk * cosh m_pL/(cosh m_pL +(h/m_pk) sinh (m_pL) = 0.95
# The root tool can be used from where a hypothetical lenght L_hyp where the infinite analytical solution (see Equation given in Lectures) can be used within a 5% error can obtained, let's define the function from which the root L can be obtained
L_f := 6*mm
f(L_f) := (sinh(m_p*L_f) + h_fin_air/(m_p*k_fin)*cosh(m_p*L_f))/(cosh(m_p*L_f) + h_fin_air/(m_p*k_fin)*sinh(m_p*L_f)) - 0.95
L_hyp := root(f(L_f), L_f)
L_hyp = 28.9005 cm
