# Homework 3 - Spring 2018
# Question 1
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# (a)
# (b)  Estimating the heat transfer in the tissuue and a assuming
# - no convection in the tissue
# - no heat generation in the tissue
# - steady state
# - spherical geometry and only radial flow
# - constant properties (density, heat capacity and thermal conductivity)
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q_imp := 1*W
D_imp := 40*mm
R_imp := D_imp/2
k_tissue := 0.5*W/(m*K)
# Replacing values in the above equation, q" will be called q_imp_2p
q_imp_2p := q_imp/(4*π*R_imp^2)
T_max := 37*K + q_imp_2p*R_imp/k_tissue
T_max = 44.9577 K
# Question 2
# See solution in a separate document, too many eqautions to include in MathCad
# Question 3
# Data
kJ := 1000*J
T_air := 250*K
V_bean := 50 mm^3
A_bean := 60*mm^2
R_bean := 3*V_bean/A_bean
R_bean = 2.5 mm
h_air := 15*W/(m^2*K)
T_ini_bean := 25*K
k_bean := 0.18*W/(m*K)
c_bean := 2.5*kJ/(K*kg)
ρ_bean := 600*kg/m^3
T_end_bean := 200*K
(a)
# First let's find out if the lumped parameter model can be used
B_i_bean := h_air*R_bean/k_bean
B_i_bean = 0.208333
# A little bit larger than 0.1 so it could be fine to use the lump parameter. So we need to estimate the resistance to heat transfer, which is outside the bean, i.e. it is only the convection, so U = h_air
m_bean := ρ_bean*V_bean
m_bean = 0.03 gm
t_roast := -ln((T_end_bean - T_air)/(T_ini_bean - T_air))*m_bean*c_bean/(h_air*A_bean)
t_roast = 125.34 s
# Question 4
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T_wi := 10*K
T_wf := 50*K
T_oil := 110*K
D_cyl := 1*m
H_cyl := 1.2*m
A_jacket := 4.2*m^2
U := 250*W/(m^2*K)
V_cyl := π*(D_cyl/2)^2*H_cyl
V_cyl = 0.942478 m^3
# Since the tank is well agitated the temperature of the water is the same in the tank so we can use the lumped parameter model, from where we can estimate the time.
# Let's assume that the density and thermal capacity of water as
ρ_water := 1000*kg/m^3
c_water := 4.18*kJ/(kg*K)
m_water := ρ_water*V_cyl
m_water = 942.478 kg
t := -m_water*c_water/(U*A_jacket)*ln((T_wf - T_oil)/(T_wi - T_oil))
t = 31.9433 min
# Question 5
# (1) Value of x where T = -2C
T_soil_ini := 18*K
T_cold_air := -15*K
h_cold_air := 25*W/(m^2*K)
t_freez := 4*hr
α_soil := 6*10^-7*m^2/s
k_soil := 0.65*W/(m*K)
T_soil := -2*K
θ := (T_soil - T_soil_ini)/(T_cold_air - T_soil_ini)
θ = 0.606061
T1 := 1/(2*sqrt(α_soil*t_freez))
T1 = 5.37914 1/m
T2 := h_cold_air/k_soil
T2 = 38.4615 1/m
T3 := h_cold_air^2*α_soil*t_freez/k_soil^2
T3 = 12.7811
T4 := h_cold_air*sqrt(α_soil*t_freez)/k_soil
T4 = 3.57506
f(x) := θ - 1 + erf(x*T1) + exp(T2*x + T3)*(1 - erf(T1*x + T4))
# Guess
# -->
x := 0.1*m
depth_2 := root(f(x), x)
depth_2 = 4.3275 cm
# (2) The temperature at the surface
x_surface := 0
T_surface := T_cold_air - (T_cold_air - T_soil_ini)*(erf(x*T1) + exp(T2*x + T3)*(1 - erf(T1*x + T4)))
T_surface = 6.55189 K
# (3) Flux
Flux := h_cold_air*(T_surface - T_cold_air)
Flux = 538.797 W/m^2
# Question 6
# We will assume an infinite slab  heated from both sides.  Data of the problem are given
# below
T_meat_ini := 25*K
Thickness := 2.5*cm
L_meat := Thickness/2
ρ_meat := 1280*kg/m^3
c_meat := 4184*J/(kg*K)
k_meat := 0.5*W/(m*K)
h_oven := 10*W/(m^2*K)
T_steril := 121*K
# We could use the chart but let's find out if rather using the charts we could use the approximate equations that are accurate for Fourier Number (Fo_meat) larger than 0.2.  Since in this case we know the time (t_ster) the calculation of the Fourier number is straight forward
t_ster := 20*min
α_meat := k_meat/(ρ_meat*c_meat)
α_meat = 9.33616e-8 m^2/s
# and
Fo_meat := α_meat*t_ster/L_meat^2
Fo_meat = 0.717017  # so, I can use the approximate solution for the slab
# The values of C_1 and γ_1 are function of the Biot number, which has to be calculated
Bi_meat := h_oven*L_meat/k_meat
Bi_meat = 0.25
# It is important to recognize that the hotter temperature will be the surface of the meat, which cannot reach a temperature higher than 155C. We can use 155K because we are dealing with temperature differences.  And we prefer to us 155K because it is allowing us to use the units of MathCad without much problems.  We also know  that the coldest temperature is the center of the meat, which has to be 121C (or 121K) at least 21 minutes.  So we need to estimate the Temperature in the oven to teach those conditions
# From Tables  for Bimeat = 0.25  C_1 = 1.0382  and  γ_1 = 0.4802, please note that MathCad units for radis are the default so nothing is included
C_1 := 1.0382
γ_1 := 0.4802
# let's calculate first the time for the center of the meat to reach a temperature of 121C if the
# temperature of the oven is 250C
# Iteration 1
T_oven_1 := 250*K
x_c := 0
n_c := x_c/L_meat
x_s := L_meat
n_s := x_s/L_meat
θ_steril_1_c := (T_steril - T_oven_1)/(T_meat_ini - T_oven_1)
θ_steril_1_c = 0.573333
Fo_meat_1 := -1/γ_1^2*ln(θ_steril_1_c/(C_1*cos(γ_1*n_c)))
# --->
t_st_1 := Fo_meat_1*L_meat^2/α_meat
t_st_1 = 71.8256 min
# Now for that time we can calculate the temperature in the surface of the meat.
θ_steril_1_s := C_1*exp(-γ_1^2*Fo_meat_1)*cos(γ_1*n_s)
θ_steril_1_s = 0.508491
T_s_1 := T_oven_1 - θ_steril_1_s*(T_oven_1 - T_meat_ini)
T_s_1 = 135.59 K  # (Or*Celcius)
# Now the time need to be 20min more with a temperature at at least 121C or more, so new
# time t_new_1 = 71.8+20 min
t_hold := 20*min
t_new_1 := t_st_1 + t_hold
t_new_1 = 91.8256 min
Fo_meat_new_1 := α_meat*t_new_1/L_meat^2
Fo_meat_new_1 = 3.29203
θ_steril_new_1_c := C_1*exp(-γ_1^2*Fo_meat_new_1)*cos(γ_1*n_c)
θ_steril_new_1_c = 0.485961
T_c_new_1 := T_oven_1 - θ_steril_new_1_c*(T_oven_1 - T_meat_ini)
T_c_new_1 = 140.659 K
# Which is fine, but new let'c check what is the temperature
# in the surface of the meat
θ_steril_new_1_s := C_1*exp(-γ_1^2*Fo_meat_new_1)*cos(γ_1*n_s)
θ_steril_new_1_s = 0.431
# and the temperature in the surface of the meat is:
T_s1 := T_oven_1 - θ_steril_new_1_s*(T_oven_1 - T_meat_ini)
T_s1 = 153.025 K
# Which is OK, so an oven temperature of 250C will be fine.  Let's repeat the calculation
# for an oven temperature of 350C to see what happens
# Iteration 2
T_oven_2 := 350*K
θ_steril_2_c := (T_steril - T_oven_2)/(T_meat_ini - T_oven_2)
θ_steril_2_c = 0.704615
Fo_meat_2 := -1/γ_1^2*ln(θ_steril_2_c/(C_1*cos(γ_1*n_c)))
# --->
t_st_2 := Fo_meat_2*L_meat^2/α_meat
t_st_2 = 46.8846 min
# Now for that time we can calculate the temperature in the surface of the meat.
θ_steril_2_s := C_1*exp(-γ_1^2*Fo_meat_2)*cos(γ_1*n_s)
θ_steril_2_s = 0.624925
T_s_2 := T_oven_2 - θ_steril_2_s*(T_oven_2 - T_meat_ini)
T_s_2 = 146.899 K  # (Or*Celcius)
# Now the time need to be 20min more with a temperature at at least 121C or more, so new
# time t_new_2 = 46.9+20 min
t_new_2 := t_st_2 + t_hold
t_new_2 = 66.8846 min
Fo_meat_new_2 := α_meat*t_new_2/L_meat^2
Fo_meat_new_2 = 2.39787
θ_steril_new_2_c := C_1*exp(-γ_1^2*Fo_meat_new_2)*cos(γ_1*n_c)
θ_steril_new_2_c = 0.597237
T_c_new_2 := T_oven_2 - θ_steril_new_2_c*(T_oven_2 - T_meat_ini)
T_c_new_2 = 155.898 K
# It is a little over, but new let'c check what is the temperature
# in the surface of the meat
θ_steril_new_2_s := C_1*exp(-γ_1^2*Fo_meat_new_2)*cos(γ_1*n_s)
θ_steril_new_2_s = 0.529691
# and the temperature in the surface of the meat is:
T_s2 := T_oven_2 - θ_steril_new_2_s*(T_oven_2 - T_meat_ini)
T_s2 = 177.85 K
# Which is over the limit of 155K, so an oven temperature of 350C will not work.
