# Homework 4 - Solutions
# ABE 30800 - Spring 2018
# Question 1
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# There will be some heat transfer between the pan and the water, that energy is used to vaporize part of the water in the water pan.  This problem is similar than the example problem given in class, but in this case we only need to estimate the heat transfer coefficient.  As we know the coefficient is a function of the Reynolds number
# Data
# Temperatures are expressed in degree Farehnheit and transformed in degree Celsius.  Absolute temperature in units of Kelvins (K)
T_w1 := 95
T_surr1 := 80
kJ := 1000*J
T_w1C := (T_w1 - 32)/1.8
T_surr1C := (T_surr1 - 32)/1.8
T_w1C = 35
T_surr1C = 26.6667
T_film1 := (T_w1C + T_surr1C)/2
T_film1 = 30.8333
T_film1K := (T_film1 + 273)*K
T_film1K = 303.833 K
# Values of the air properties are taken at 300K (it will not change much respect to 303.8K)
ρ_1 := 1.17*kg/m^3
μ_1 := 1.85*10^-5*kg/(m*s)
u_inf1 := 2*ft/s
k_1 := 0.026*W/(m*K)
c_1 := 1*kJ/(kg*K)
Pr_1 := 0.706
L_1 := 2*ft
Re_L1 := L_1*ρ_1*u_inf1/μ_1
Re_L1 = 23502  # Flow is laminar
Nu_L1 := 0.664*Re_L1^(1/2)*Pr_1^(1/3)
Nu_L1 = 90.6404
h_L1 := k_1*Nu_L1/L_1
h_L1 = 3.8659 W/(m^2*K)
# Question 2
# The building is square with sides of 20m. Assume that the air surrounds the building so the heat transfer is through 4 sides.  Let's calculate first the heat transfer coefficient h._L2
u_2 := 30*km/hr
L_2 := 20*m
T_air2 := -10
T_w2 := 10
T_film2 := ((T_air2 + 273) + (T_w2 + 273))/2*K
T_film2 = 273 K
# The properties of the air at 273k (let's use 270K) in the air table
ρ_2 := 1.30*kg/m^3
μ_2 := 1.70*10^-5*kg/(m*s)
k_2 := 0.0238*W/(m*K)
c_2 := 1*kJ/(kg*K)
Pr_2 := 0.716
Re_L2 := u_2*ρ_2*L_2/μ_2
Re_L2 = 12745098  # Turbulent flow
Nu_L2 := 0.036*Re_L2^(4/5)*Pr_2^(1/3)
Nu_L2 = 15567.4
h_L2 := k_2*Nu_L2/L_2
h_L2 = 18.5251 W/(m^2*K)
Q_2_per_length := h_L2*(4*L_2)*(T_w2 - T_air2)*K
Q_2_per_length = 29640.2 W/m
# Question 3
m3_dot := 200*gm/s
D_3 := 2*cm
T_w3 := 80
T_w3K := (T_w3 + 273)*K
T_tw3 := 200
T_tw3K := (T_tw3 + 273)*K
T_film3K := (T_w3K + T_tw3K)/2
T_film3K = 413 K
T_film3 := T_film3K/(1*K) - 273
T_film3 = 140  # degree Celsius
# Properties of Saturated liquid water at 140^oC are:
ρ_w3 := 921.7*kg/m^3
c_3 := 4.38*kJ/(kg*K)
k_w3 := 0.683*W/(m*K)
Pr_3 := 1.24
μ_3 := 0.197*10^-3*kg/(m*s)
u_3 := 4*m3_dot/(ρ_w3*π*D_3^2)
u_3 = 0.690702 m/s
Re_D3 := u_3*ρ_w3*D_3/μ_3
Re_D3 = 64631.4  # Turbulent Flow
Nu_D3 := 0.023*Re_D3^(4/5)*Pr_3^0.4
Nu_D3 = 176.788
h_D3 := k_w3*Nu_D3/D_3
h_D3 = 6037.29 W/(m^2*K)
Q_3 := h_D3*π*D_3*(T_tw3K - T_w3K)
Q_3 = 45.5201 kW/m
# (b)
D_new := 1.9*cm
u_new := 4*m3_dot/(ρ_w3*π*D_new^2)
Re_D_new := u_new*ρ_w3*D_new/μ_3
Re_D_new = 68033.1  # Turbulent Flow
Nu_D_new := 0.023*Re_D_new^(4/5)*Pr_3^0.4
Nu_D_new = 184.193
h_D_new := k_w3*Nu_D_new/D_new
h_D_new = 6621.25 W/(m^2*K)
Q_3_new := h_D_new*π*D_new*(T_tw3K - T_w3K)
Q_3_new = 47.4269 kW/m
# The heat gain is increased because the velocity of the fluid is increased when the diameter decreases.  However, the result woud be different if the scale formed has a low thermal conductivity but no information is giving so we cannot evaluate this.  The increase of roughness may promote turbulence and increase the heat transfer coefficient.
# Question 4
# (a)
D_per := 30*cm
L_per := 1.8*m
T_body := 37*K
u_wind := 5*m/s
T_air4 := 35*K
T_film4 := ((T_body + 273*K) + (T_air4 + 273*K))/2
T_film4 = 309 K
# Let's use the properties of air at 310K
ρ_4 := 1.138*kg/m^3
c_4 := 1.007*kJ/(kg*K)
μ_4 := 1.893*10^-5*kg/(m*s)
k_4 := 0.027*W/(m*K)
Pr_4 := 0.705
Re_D4 := u_wind*ρ_4*D_per/μ_4
Re_D4 = 90174.3
# From Table
B := 0.027
n := 0.805
Nu_D4 := B*Re_D4^n*Pr_4^(1/3)
Nu_D4 = 234.208
h_4 := k_4*Nu_D4/D_per
h_4 = 21.0787 W/(m^2*K)
q_4 := h_4*π*D_per*L_per*(T_body - T_air4)
q_4 = 71.5184 W
# for calm day
h_calm := 3.6*W/(m^2*K)
q_4calm := h_calm*(π*D_per*L_per*(T_body - T_air4))
q_4calm = 12.2145 W  # much lower value of heat loss
# If the velocity of the air increases to 10 m/s and the temperatures decreases to 10^oC
u_wind_new := 10*m/s
T_air_new := 10*K
T_film_new := ((T_air_new + 273*K) + (T_body + 273*K))/2
T_film_new = 296.5 K
# Let's use values of tables at 295K
ρ_new := 1.19*kg/m^3
μ_new := 1.82*10^-5*kg/(m*s)
k_new := 0.026*W/(m*K)
Pr_new := 0.706
Re_new := u_wind_new*ρ_new*D_per/μ_new
Re_new = 196154
# From the Table B =0.027 and n = 0.805
Nu_D_4new := B*Re_new^n*Pr_new^(1/3)
Nu_D_4new = 438.032
h_new := k_new*Nu_D_4new/D_per
h_new = 37.9628 W/(m^2*K)
q_new := h_new*π*D_per*L_per*(T_body - T_air_new)
q_new = 1.73886 kW
# Significantly larger
# loss in a windy day
# Question 5
T_air5 := 15*K
T_m := -0.5*K
k_unf := 0.55*W/(m*K)
ρ_unf := 950*kg/m^3
ΔH_f := 335*kJ/kg
h := 20*W/(m^2*K)
# Scenary 1 - there is convection from one side
x_1_side := 2.5*cm
t_F1 := ΔH_f*ρ_unf/(T_air5 - T_m)*(x_1_side^2/(2*k_unf) + x_1_side/h)
t_F1 = 10.3698 hr
# Scenary 2 - there is convection from one side
x_2_side := 1.25*cm
t_F2 := ΔH_f*ρ_unf/(T_air5 - T_m)*(x_2_side^2/(2*k_unf) + x_2_side/h)
t_F2 = 4.37477 hr
